# OpenSim document version 20302
Model tugOfWar:
  length_units: meters
  force_units: N
  gravity: 0 -9.80665 0
  BodySet:
    Body ground: mass=0 mass_center=(0 0 0) inertia_xx=1 inertia_yy=1 inertia_zz=1
        meshes=(ground.vtp anchor1.vtp anchor2.vtp)
    Body block: mass=20 mass_center=(0 0 0) inertia_xx=0.1333333 inertia_yy=0.1333333 inertia_zz=0.1333333
        meshes=block.vtp
      FreeJoint blockToGround: parent_body=ground location_in_parent=(0 0.05 0) location=(0 0.05 0)
        Coordinate blockToGround_xRotation: motion_type=rotational default_value=0 initial_value=0
            range=(-1.5708 1.5708) clamped=false locked=true
        Coordinate blockToGround_yRotation: motion_type=rotational default_value=0 initial_value=0
            range=(-1.5708 1.5708) clamped=false locked=true
        Coordinate blockToGround_zRotation: motion_type=rotational default_value=0 initial_value=0
            range=(-1.5708 1.5708) clamped=false locked=true
        Coordinate blockToGround_xTranslation: motion_type=translational default_value=0 initial_value=0 range=(-1 1)
            clamped=false
        Coordinate blockToGround_yTranslation: motion_type=translational default_value=0 initial_value=0 range=(-1 1)
            clamped=false locked=true
        Coordinate blockToGround_zTranslation: motion_type=translational default_value=0 initial_value=0 range=(-1 1)
            clamped=false
  ForceSet:
    Thelen2003Muscle Liu: min_control=0 max_control=1 max_isometric_force=1000 optimal_fiber_length=0.2
        tendon_slack_length=0.2 pennation_angle_at_optimal=0 activation_time_constant=0.015
        deactivation_time_constant=0.05 fatigue_factor=0.3 recovery_factor=0.2
      PathPoint point1: ground (0 0.05 -0.35)
      PathPoint point2: block (0 0.05 -0.05)
    Thelen2003Muscle Thelen: min_control=0 max_control=1 max_isometric_force=1000 optimal_fiber_length=0.2
        tendon_slack_length=0.2 pennation_angle_at_optimal=0 default_activation=0.01 default_fiber_length=0.1
        activation_time_constant=0.015 deactivation_time_constant=0.05
      PathPoint point1: ground (0 0.05 0.35)
      PathPoint point2: block (0 0.05 0.05)
  ControllerSet Controllers:
    PrescribedController: actuator_list=(Liu Thelen)
      FunctionSet ControlFunctions: LinearFunction(coefficients=1 0) LinearFunction(coefficients=1 0)
