# OpenSim document version 30517
Model BuiltinGeometry:
  PhysicalOffsetFrame LeftAnchor: socket_parent=../ground translation=(0 0.05 0.35) [meters]
  PhysicalOffsetFrame RightAnchor: socket_parent=../ground translation=(0 0.05 -0.35)
  PhysicalOffsetFrame CylAnchor: socket_parent=../ground translation=(-0.2 0 0)
  PhysicalOffsetFrame EllipsoidAnchor: socket_parent=../ground translation=(-0.6 0.6 0)
  Ground:
    Brick brick_: socket_frame=../ scale_factors=(1 1 1) half_lengths=(0.5 0.01 0.5)
    Brick brick__0: socket_frame=../../LeftAnchor scale_factors=(5 1 1) half_lengths=(0.05 0.05 0.05)
    Brick brick__1: socket_frame=../../RightAnchor scale_factors=(5 1 1) half_lengths=(0.05 0.05 0.05)
    Cylinder cylinder_: socket_frame=../../CylAnchor radius=0.2 half_height=0.3
    Ellipsoid ellipsoid_: socket_frame=../../EllipsoidAnchor radii=(0.2 0.7 0.5)
  BodySet:
    Body block: mass=20 [kg] mass_center=(0 0 0) inertia=(0.1333333 0.1333333 0.1333333 0 0 0)
      Sphere sphere_: radius=0.1
  JointSet:
    FreeJoint blockToGround: socket_parent_frame=ground_offset socket_child_frame=../../bodyset/block
      Coordinate blockToGround_xRotation: range=(-1.570796 1.570796)
      Coordinate blockToGround_yRotation: range=(-1.570796 1.570796)
      Coordinate blockToGround_zRotation: range=(-1.570796 1.570796)
      Coordinate blockToGround_xTranslation: default_value=0.2 range=(-1 1)
      Coordinate blockToGround_yTranslation: default_value=-0.00196133 range=(-1 1)
      Coordinate blockToGround_zTranslation: range=(-1 1)
      PhysicalOffsetFrame ground_offset: socket_parent=../../../ground translation=(0 0.05 0)
  ControllerSet:
    PrescribedController prescribedcontroller_: actuator_list=(muscle1 muscle2)
      FunctionSet ControlFunctions: LinearFunction(coefficients=-0.333333 1) LinearFunction(coefficients=0.316667 0.05)
  ConstraintSet:
    ConstantDistanceConstraint constantdistanceconstraint_: socket_body_1=../../ground
        socket_body_2=../../bodyset/block location_body_1=(0 0.05 0) location_body_2=(0 0 0) constant_distance=0.2
  ForceSet:
    Thelen2003Muscle muscle1: max_isometric_force=1000 optimal_fiber_length=0.25 tendon_slack_length=0.1
        pennation_angle_at_optimal=0 [radians] default_activation=1 default_fiber_length=0.25
      PathPoint point1: ground (0 0.05 -0.35)
      PathPoint point2: block (0 0 -0.05)
    Thelen2003Muscle muscle2: max_isometric_force=1000 optimal_fiber_length=0.25 tendon_slack_length=0.1
        pennation_angle_at_optimal=0 default_activation=0.05 default_fiber_length=0.25
      PathPoint point1: ground (0 0.05 0.35)
      PathPoint point2: block (0 0 0.05)
    PrescribedForce: socket_frame=../../bodyset/block
      FunctionSet forceFunctions: PiecewiseLinearFunction(x=0 3, y=0 588.399) Constant(value=0) Constant(value=0)
      FunctionSet pointFunctions: Constant(value=0) Constant(value=0) Constant(value=0)
